<Lems>

        <!-- Example showing new types of network populations & projection templates in v2 -->

        <!-- This is a file which can be read and executed by the LEMS Interpreter.
             It imports the LEMS definitions of the core NeuroML 2 Components, creates
             a model in "pure" NeuroML 2 and contains some LEMS elements for running
             a simulation -->

    <Target component="sim1"/>

    <Include file="NeuroMLCoreDimensions.xml"/>
    <Include file="Cells.xml"/>
    <Include file="Networks.xml"/>
    <Include file="Simulation.xml"/>

    <!-- NeuroML 2 elements... -->

    <spikeGenerator id="spiker" period="30ms"/>

    <spikeGeneratorRandom id="randSpiker" minISI="10ms" maxISI="30ms"/>

    <spikeArray id="spikes2">
        <spike id="0" time="55ms"/>
        <spike id="1" time="85ms"/>
        <spike id="2" time="135ms"/>
    </spikeArray>

    <spikeArray id="spike100">
        <spike id="0" time="100ms"/>
    </spikeArray>

    <iafCell id="iaf1" leakReversal="-60mV" thresh="-55mV" reset="-70mV" C="1e-5uF" leakConductance="5e-7mS"/>
    <iafCell id="iaf2" leakReversal="-60mV" thresh="-55mV" reset="-70mV" C="1e-5uF" leakConductance="5.2e-7mS"/>

    <expTwoSynapse id="syn1" gbase="0.1nS" erev="0mV" tauRise="0.1ms" tauDecay="2ms">
    </expTwoSynapse>

    <ComponentType name="expOneSynapseW" extends="baseConductanceBasedSynapse">

        <Property name="weight" dimension="none" />
        <Parameter name="tauDecay" dimension="time" />

        <Child name="notes" type="notes"/>

        <Dynamics>

            <StateVariable name="g" dimension="conductance" exposure="g"/>

            <TimeDerivative variable="g" value="-g / tauDecay" />

            <OnStart>
                <StateAssignment variable="g" value="0" />
            </OnStart>

            <OnEvent port="in">
                <StateAssignment variable="g" value="g + gbase" />
            </OnEvent>

            <DerivedVariable name="i" exposure="i" dimension="current" value="weight * g * (erev - v)" />
        </Dynamics>
    </ComponentType>

    <expOneSynapseW id="synW" gbase="0.1nS" erev="0mV" tauDecay="2ms"/>

    <network id="net2">

            <!--<region id="BoxA">
                <rectangularExtent xStart="0.0" yStart="300.0" zStart="0.0" xLength="80.0" yLength="120.0" zLength="80.0"/>
            </region>-->

        <population id="randSpikersPop" component="randSpiker" size="3"/>

        <population id="spikersPop" component="spiker" size="1"/>

        <population id="spikeArrayPop" component="spikes2" size="1"/>

        <population id="spike100Pop" component="spike100" size="3"/>

        <population id="iafPop" component="iaf1" size="3"/>

<!--
        <synapticConnectionWD from="spike100Pop[0]" to="iafPop[0]" synapse="synW" weight="1.5" delay="5ms"/>  Delays need to have dimensions!!
        <synapticConnectionWD from="spike100Pop[1]" to="iafPop[1]" synapse="synW" weight="0.5" delay="10ms"/>
        <synapticConnectionWD from="spike100Pop[2]" to="iafPop[2]" synapse="synW" weight="0.25" delay="15ms"/>-->

    </network>

   <!-- End of NeuroML 2 elements... -->

    <!--
    <Simulation id="sim1" length="300ms" step="0.01ms" target="net2">
        <Display id="d0" title="Ex12: random spike sources" timeScale="1ms">
            <Line id="l0" quantity="randSpikersPop[0]/tsince" scale="1ms" color="#000000" save="examples/testResults/rsp_0.dat"/>
            <Line id="l1" quantity="randSpikersPop[1]/tsince" scale="1ms" color="#00ff00" save="examples/testResults/rsp_1.dat"/>
            <Line id="l2" quantity="randSpikersPop[2]/tsince" scale="1ms" color="#ddff00" save="examples/testResults/rsp_2.dat"/>
        </Display>
        <Display id="d1" title="Ex12: spikersPop" timeScale="1ms">
            <Line id="l0" quantity="spikersPop[0]/tsince" scale="1ms" color="#000000" save="examples/testResults/sp_0.dat"/>
        </Display>
        <Display id="d2" title="Ex12: spike array" timeScale="1ms">
            <Line id="l0" quantity="spikeArrayPop[0]/0/tsince" scale="1ms" color="#000000" save="examples/testResults/spd_0.dat"/>
            <Line id="l1" quantity="spikeArrayPop[0]/1/tsince" scale="1ms" color="#00ff00" save="examples/testResults/spd_1.dat"/>
            <Line id="l2" quantity="spikeArrayPop[0]/2/tsince" scale="1ms" color="#ddff00" save="examples/testResults/spd_2.dat"/>
            <Line id="l2" quantity="spikeArrayPop[0]/tsince" scale="1ms" color="#ff0000" save="examples/testResults/spd_3.dat"/>
        </Display>
        <Display id="dcells" title="Ex12: iafPop" timeScale="1ms">
            <Line id="l0" quantity="iafPop[0]/v" scale="1mV" color="#000000" save="examples/testResults/iaf11_v0.dat"/>
            <Line id="l1" quantity="iafPop[1]/v" scale="1mV" color="#008800" save="examples/testResults/iaf12_v1.dat"/>
            <Line id="l2" quantity="iafPop[2]/v" scale="1mV" color="#880000" save="examples/testResults/iaf12_v2.dat"/>
        </Display>
    </Simulation>-->

    <SimulationSet id="sim1">
        <Display id="disp1" title="Ex12: iafPop" xmin="0" xmax="300" ymin="-90" ymax="60"/>

        <Simulation id="sim1" length="300ms" step="0.01ms" target="net2" display="disp1">

            <DisplayList timeScale="1ms" title="Ex12: iafPop">

                <Line id ="l1" quantity="iafPop[0]/v" scale="1mV"  color="#f33fff" timeScale="1ms"/>
                <Line id ="l2" quantity="iafPop[1]/v" scale="1mV"  color="#BBA0AA" timeScale="1ms"/>
                <Line id ="l3" quantity="iafPop[2]/v" scale="1mV"  color="#BBFFAA" timeScale="1ms"/>
                <Line id ="lx" quantity="spikeArrayPop[0]/tsince" scale="1mV"  color="#BB2222" timeScale="1ms"/>
            </DisplayList>
        </Simulation>
    </SimulationSet>

</Lems>
