<neuroml xmlns="http://www.neuroml.org/schema/neuroml2"  xmlns:xs="http://www.w3.org/2001/XMLSchema" xmlns:xsi="http://www.w3.org/2001/XMLSchema-instance" xsi:schemaLocation="http://www.neuroml.org/schema/neuroml2 https://raw.github.com/NeuroML/NeuroML2/development/Schemas/NeuroML2/NeuroML_v2beta5.xsd" id="Complete">
    <notes>Lots of notes....</notes>
    <expOneSynapse id="syn0" gbase="65nS" erev="0mV" tauDecay="3ms"/>
    <expTwoSynapse id="syn1" gbase="65nS" erev="0mV" tauDecay="3ms" tauRise="1ms"/>
    <gapJunction id="gj1" conductance="10pS"/>
    <silentSynapse id="silent1"/>
    <gradedSynapse id="gs1" conductance="5pS" delta="5mV" Vth="-55mV" k="0.025per_ms" erev="0mV"/>
    <iafCell id="iaf0" leakReversal="-65mV" thresh="-50mV" reset="-65mV" C="1.0 nF" leakConductance="10 nS"/>
    <iafCell id="iaf1" leakReversal="-65mV" thresh="-50mV" reset="-65mV" C="1.0 nF" leakConductance="20 nS"/>
    <izhikevichCell id="iz0" v0="-70mV" thresh="30mV" a="0.02" b="0.2" c="-65.0" d="6"/>
    <poissonFiringSynapse id="pfs" averageRate="50Hz" synapse="syn0" spikeTarget="./syn0"/>
    <network id="CompleteNet" type="networkWithTemperature" temperature="6.3 degC">
        <notes>Network notes...</notes>
        <population id="IafPop0" component="iaf0" size="10"/>
        <population id="IafPop1" component="iaf1" size="10"/>
        <population id="IzhPop" component="iz0" size="10"/>
        <population id="Pop_x" component="iaf0" size="8" type="populationList">
            <instance id="0">
                <location x="26.181799425472164" y="43.593338761316161" z="203.620881835199157"/>
            </instance>
            <instance id="1">
                <location x="53.850117469219526" y="450.599438975847306" z="19.076833051161202"/>
            </instance>
            <instance id="2">
                <location x="268.101020016963446" y="166.098849254839934" z="426.043309464684341"/>
            </instance>
            <instance id="3">
                <location x="79.831198360984956" y="168.608328554637751" z="166.898197314477642"/>
            </instance>
            <instance id="4">
                <location x="122.581676258805558" y="0.835276789611428" z="218.137896707609201"/>
            </instance>
            <instance id="5">
                <location x="43.806749875211437" y="298.799732243995265" z="34.938480729591213"/>
            </instance>
            <instance id="6">
                <location x="157.729486867931655" y="224.16085415347186" z="452.699326142249447"/>
            </instance>
            <instance id="7">
                <location x="46.382280689247544" y="71.087532215750542" z="395.035922179400814"/>
            </instance>
        </population>
        <projection id="Proj" presynapticPopulation="Pop_x" postsynapticPopulation="Pop_x" synapse="syn0">
            <connectionWD id="0" preCellId="../Pop_x/0/iaf0" preFractionAlong="0.9111505480903207" postCellId="../Pop_x/1/iaf0" postFractionAlong="0.5734080856809272" weight="0.265321705261563" delay="8.378376441951344ms"/>
            <connectionWD id="1" preCellId="../Pop_x/0/iaf0" preFractionAlong="0.3982381514678992" postCellId="../Pop_x/4/iaf0" postFractionAlong="0.7692790899139238" weight="0.512752133864065" delay="6.84837218661006ms"/>
            <connectionWD id="2" preCellId="../Pop_x/0/iaf0" preFractionAlong="0.03184130674110186" postCellId="../Pop_x/5/iaf0" postFractionAlong="0.7541731718588721" weight="0.181464915915041" delay="8.201901844338309ms"/>
            <connectionWD id="3" preCellId="../Pop_x/0/iaf0" preFractionAlong="0.4567670702014537" postCellId="../Pop_x/6/iaf0" postFractionAlong="0.5731685145105314" weight="0.336106099309834" delay="1.8906186957807647ms"/>
            <connectionWD id="4" preCellId="../Pop_x/1/iaf0" preFractionAlong="0.48381148264314666" postCellId="../Pop_x/7/iaf0" postFractionAlong="0.17758973057390504" weight="0.991957772794217" delay="4.444999201490742ms"/>
            <connectionWD id="5" preCellId="../Pop_x/2/iaf0" preFractionAlong="0.2719298523267516" postCellId="../Pop_x/0/iaf0" postFractionAlong="0.43426858361265375" weight="0.420357316735054" delay="1.0862083448160165ms"/>
            <connectionWD id="6" preCellId="../Pop_x/2/iaf0" preFractionAlong="0.694205914699235" postCellId="../Pop_x/3/iaf0" postFractionAlong="0.40420726708424737" weight="0.985348174888327" delay="2.6254001971904994ms"/>
            <connectionWD id="7" preCellId="../Pop_x/2/iaf0" preFractionAlong="0.7177179073521607" postCellId="../Pop_x/6/iaf0" postFractionAlong="0.6790519516466869" weight="0.372109619295305" delay="2.3496343749846513ms"/>
            <connectionWD id="8" preCellId="../Pop_x/2/iaf0" preFractionAlong="0.6559317169521112" postCellId="../Pop_x/7/iaf0" postFractionAlong="0.9158231935739135" weight="0.776132969824037" delay="3.8925926661855117ms"/>
            <connectionWD id="9" preCellId="../Pop_x/3/iaf0" preFractionAlong="0.06205576465547391" postCellId="../Pop_x/0/iaf0" postFractionAlong="0.1360157911087615" weight="0.668447137032541" delay="3.495396856198003ms"/>
            <connectionWD id="10" preCellId="../Pop_x/3/iaf0" preFractionAlong="0.5215907717112922" postCellId="../Pop_x/2/iaf0" postFractionAlong="0.8713946678999259" weight="0.514719140206116" delay="1.3737149792589898ms"/>
            <connectionWD id="11" preCellId="../Pop_x/3/iaf0" preFractionAlong="0.5063014868143146" postCellId="../Pop_x/4/iaf0" postFractionAlong="0.20327205126356085" weight="0.322057226781164" delay="3.9817018093932175ms"/>
            <connectionWD id="12" preCellId="../Pop_x/3/iaf0" preFractionAlong="0.5646244900742771" postCellId="../Pop_x/6/iaf0" postFractionAlong="0.08510002940969075" weight="0.317028202740408" delay="3.4114424552421796ms"/>
            <connectionWD id="13" preCellId="../Pop_x/3/iaf0" preFractionAlong="0.7305603280541011" postCellId="../Pop_x/7/iaf0" postFractionAlong="0.7769544424729391" weight="0.256851738048816" delay="8.327770443873531ms"/>
            <connectionWD id="14" preCellId="../Pop_x/4/iaf0" preFractionAlong="0.6347827539292025" postCellId="../Pop_x/0/iaf0" postFractionAlong="0.898268251074767" weight="0.790526029476503" delay="6.091577855523774ms"/>
            <connectionWD id="15" preCellId="../Pop_x/4/iaf0" preFractionAlong="0.6689472932800722" postCellId="../Pop_x/1/iaf0" postFractionAlong="0.4207616695426898" weight="0.358670556668895" delay="7.702859673578057ms"/>
            <connectionWD id="16" preCellId="../Pop_x/4/iaf0" preFractionAlong="0.41472735535603067" postCellId="../Pop_x/2/iaf0" postFractionAlong="0.5004747976770939" weight="0.829357735249606" delay="1.7487867814549418ms"/>
            <connectionWD id="17" preCellId="../Pop_x/4/iaf0" preFractionAlong="0.9442210523827754" postCellId="../Pop_x/5/iaf0" postFractionAlong="0.05160391767299877" weight="0.388418155152456" delay="1.0746590394935085ms"/>
            <connectionWD id="18" preCellId="../Pop_x/4/iaf0" preFractionAlong="0.571521105945508" postCellId="../Pop_x/6/iaf0" postFractionAlong="0.2484133090733609" weight="0.690468269999967" delay="5.00995811633457ms"/>
            <connectionWD id="19" preCellId="../Pop_x/5/iaf0" preFractionAlong="0.04276007019212802" postCellId="../Pop_x/1/iaf0" postFractionAlong="0.9981342296444798" weight="0.141551757796414" delay="8.70467255784429ms"/>
            <connectionWD id="20" preCellId="../Pop_x/5/iaf0" preFractionAlong="0.5801048271426202" postCellId="../Pop_x/4/iaf0" postFractionAlong="0.9813135565365696" weight="0.320623366012009" delay="3.865008743671855ms"/>
            <connectionWD id="21" preCellId="../Pop_x/5/iaf0" preFractionAlong="0.6070585475338274" postCellId="../Pop_x/6/iaf0" postFractionAlong="0.49680968876011555" weight="0.164769539223915" delay="0.46621071319652985ms"/>
            <connectionWD id="22" preCellId="../Pop_x/6/iaf0" preFractionAlong="0.2824470291123572" postCellId="../Pop_x/0/iaf0" postFractionAlong="0.09215872811695913" weight="0.442712415850619" delay="5.449613597795614ms"/>
            <connectionWD id="23" preCellId="../Pop_x/6/iaf0" preFractionAlong="0.7915177900236534" postCellId="../Pop_x/1/iaf0" postFractionAlong="0.11094804898017563" weight="0.570007640366697" delay="7.61696224317614ms"/>
            <connectionWD id="24" preCellId="../Pop_x/6/iaf0" preFractionAlong="0.03755665752648618" postCellId="../Pop_x/2/iaf0" postFractionAlong="0.9100241304052978" weight="0.073439921465894" delay="9.271381201286816ms"/>
            <connectionWD id="25" preCellId="../Pop_x/6/iaf0" preFractionAlong="0.29138316904878636" postCellId="../Pop_x/5/iaf0" postFractionAlong="0.18592795211214297" weight="0.1127194932293" delay="6.709498512970625ms"/>
            <connectionWD id="26" preCellId="../Pop_x/6/iaf0" preFractionAlong="0.22204968713636175" postCellId="../Pop_x/7/iaf0" postFractionAlong="0.6624214121703437" weight="0.43460320972408" delay="5.604854687225679ms"/>
            <connectionWD id="27" preCellId="../Pop_x/7/iaf0" preFractionAlong="0.46010439043098517" postCellId="../Pop_x/2/iaf0" postFractionAlong="0.862150865442184" weight="0.551800210882795" delay="0.17422567643458176ms"/>
            <connectionWD id="28" preCellId="../Pop_x/7/iaf0" preFractionAlong="0.08277047261975956" postCellId="../Pop_x/6/iaf0" postFractionAlong="0.6687451541867189" weight="0.959225746872153" delay="1.7979665412597146ms"/>
        </projection>
        <projection id="ProjEmpty" presynapticPopulation="IafPop0" postsynapticPopulation="IafPop1" synapse="syn0"/>
        <projection id="ProjConnection" presynapticPopulation="IafPop0" postsynapticPopulation="IafPop1" synapse="syn1">
            <connection id="0" preCellId="../IafPop0/9/iaf0" preFractionAlong="0.5497428483636986" postCellId="../IafPop1/9/iaf0" postFractionAlong="0.9913272921358579"/>
        </projection>
        <electricalProjection id="ElectProj" presynapticPopulation="Pop_x" postsynapticPopulation="Pop_x">
            <electricalConnectionInstance id="0" preCell="../Pop_x/0/iaf0" preFractionAlong="0.7687947474799836" postCell="../Pop_x/1/iaf0" postFractionAlong="0.3434621581559646" synapse="gj1"/>
            <electricalConnectionInstance id="1" preCell="../Pop_x/0/iaf0" preFractionAlong="0.6383532643054988" postCell="../Pop_x/4/iaf0" postFractionAlong="0.666657631073181" synapse="gj1"/>
            <electricalConnectionInstance id="2" preCell="../Pop_x/0/iaf0" preFractionAlong="0.9136459118642296" postCell="../Pop_x/5/iaf0" postFractionAlong="0.6580741574010793" synapse="gj1"/>
            <electricalConnectionInstance id="3" preCell="../Pop_x/0/iaf0" preFractionAlong="0.08815729492607605" postCell="../Pop_x/6/iaf0" postFractionAlong="0.6283175227307927" synapse="gj1"/>
            <electricalConnectionInstance id="4" preCell="../Pop_x/1/iaf0" preFractionAlong="0.7516501580275301" postCell="../Pop_x/7/iaf0" postFractionAlong="0.044129856006443924" synapse="gj1"/>
            <electricalConnectionInstance id="5" preCell="../Pop_x/2/iaf0" preFractionAlong="0.06260877482831684" postCell="../Pop_x/0/iaf0" postFractionAlong="0.3550614469278791" synapse="gj1"/>
            <electricalConnectionInstance id="6" preCell="../Pop_x/2/iaf0" preFractionAlong="0.47251074040704333" postCell="../Pop_x/3/iaf0" postFractionAlong="0.7508149412392692" synapse="gj1"/>
            <electricalConnectionInstance id="7" preCell="../Pop_x/2/iaf0" preFractionAlong="0.07837647814122528" postCell="../Pop_x/6/iaf0" postFractionAlong="0.8789089368844193" synapse="gj1"/>
            <electricalConnectionInstance id="8" preCell="../Pop_x/2/iaf0" preFractionAlong="0.1264699588337581" postCell="../Pop_x/7/iaf0" postFractionAlong="0.974929566217395" synapse="gj1"/>
            <electricalConnectionInstance id="9" preCell="../Pop_x/3/iaf0" preFractionAlong="0.8710772077623383" postCell="../Pop_x/0/iaf0" postFractionAlong="0.7401645088205959" synapse="gj1"/>
            <electricalConnectionInstance id="10" preCell="../Pop_x/3/iaf0" preFractionAlong="0.5001225106774085" postCell="../Pop_x/2/iaf0" postFractionAlong="0.5454577410692435" synapse="gj1"/>
            <electricalConnectionInstance id="11" preCell="../Pop_x/3/iaf0" preFractionAlong="0.938262488697077" postCell="../Pop_x/4/iaf0" postFractionAlong="0.08036181297992573" synapse="gj1"/>
            <electricalConnectionInstance id="12" preCell="../Pop_x/3/iaf0" preFractionAlong="0.5376819978167684" postCell="../Pop_x/6/iaf0" postFractionAlong="0.9293743214794234" synapse="gj1"/>
            <electricalConnectionInstance id="13" preCell="../Pop_x/3/iaf0" preFractionAlong="0.5779441734191155" postCell="../Pop_x/7/iaf0" postFractionAlong="0.4861199583152066" synapse="gj1"/>
            <electricalConnectionInstance id="14" preCell="../Pop_x/4/iaf0" preFractionAlong="0.49447442101981154" postCell="../Pop_x/0/iaf0" postFractionAlong="0.6957821740554558" synapse="gj1"/>
            <electricalConnectionInstance id="15" preCell="../Pop_x/4/iaf0" preFractionAlong="0.3430332825441691" postCell="../Pop_x/1/iaf0" postFractionAlong="0.7537139593993878" synapse="gj1"/>
            <electricalConnectionInstance id="16" preCell="../Pop_x/4/iaf0" preFractionAlong="0.5590304685861194" postCell="../Pop_x/2/iaf0" postFractionAlong="0.3685171907332482" synapse="gj1"/>
            <electricalConnectionInstance id="17" preCell="../Pop_x/4/iaf0" preFractionAlong="0.5735303220569729" postCell="../Pop_x/5/iaf0" postFractionAlong="0.9631245784933979" synapse="gj1"/>
            <electricalConnectionInstance id="18" preCell="../Pop_x/4/iaf0" preFractionAlong="0.9054631957637249" postCell="../Pop_x/6/iaf0" postFractionAlong="0.27502127242966223" synapse="gj1"/>
            <electricalConnectionInstance id="19" preCell="../Pop_x/5/iaf0" preFractionAlong="0.8915326292942939" postCell="../Pop_x/1/iaf0" postFractionAlong="0.22085700629420923" synapse="gj1"/>
            <electricalConnectionInstance id="20" preCell="../Pop_x/5/iaf0" preFractionAlong="0.6879893085936124" postCell="../Pop_x/4/iaf0" postFractionAlong="0.06263564431359725" synapse="gj1"/>
            <electricalConnectionInstance id="21" preCell="../Pop_x/5/iaf0" preFractionAlong="0.5247721982443964" postCell="../Pop_x/6/iaf0" postFractionAlong="0.7638566846893943" synapse="gj1"/>
            <electricalConnectionInstance id="22" preCell="../Pop_x/6/iaf0" preFractionAlong="0.27929936950932854" postCell="../Pop_x/0/iaf0" postFractionAlong="0.19529882461359027" synapse="gj1"/>
            <electricalConnectionInstance id="23" preCell="../Pop_x/6/iaf0" preFractionAlong="0.4360117280281445" postCell="../Pop_x/1/iaf0" postFractionAlong="0.35646624232715174" synapse="gj1"/>
            <electricalConnectionInstance id="24" preCell="../Pop_x/6/iaf0" preFractionAlong="0.010956133993142214" postCell="../Pop_x/2/iaf0" postFractionAlong="0.6562134498500771" synapse="gj1"/>
            <electricalConnectionInstance id="25" preCell="../Pop_x/6/iaf0" preFractionAlong="0.8217967921854112" postCell="../Pop_x/5/iaf0" postFractionAlong="0.21201111015301333" synapse="gj1"/>
            <electricalConnectionInstance id="26" preCell="../Pop_x/6/iaf0" preFractionAlong="0.3900868227859483" postCell="../Pop_x/7/iaf0" postFractionAlong="0.9836708374629459" synapse="gj1"/>
            <electricalConnectionInstance id="27" preCell="../Pop_x/7/iaf0" preFractionAlong="0.520872260279999" postCell="../Pop_x/2/iaf0" postFractionAlong="0.28875658186370823" synapse="gj1"/>
            <electricalConnectionInstance id="28" preCell="../Pop_x/7/iaf0" preFractionAlong="0.12614697125801966" postCell="../Pop_x/6/iaf0" postFractionAlong="0.4751641611797546" synapse="gj1"/>
        </electricalProjection>
        <electricalProjection id="ElectProjW" presynapticPopulation="Pop_x" postsynapticPopulation="Pop_x">
            <electricalConnectionInstanceW id="0" preCell="../Pop_x/0/iaf0" preFractionAlong="0.801496591292033" postCell="../Pop_x/1/iaf0" postFractionAlong="0.2068624706661114" synapse="gj1" weight="0.608902526190553"/>
            <electricalConnectionInstanceW id="1" preCell="../Pop_x/0/iaf0" preFractionAlong="0.8900985705369023" postCell="../Pop_x/4/iaf0" postFractionAlong="0.486136470143564" synapse="gj1" weight="0.668470221903147"/>
            <electricalConnectionInstanceW id="2" preCell="../Pop_x/0/iaf0" preFractionAlong="0.17012688767090822" postCell="../Pop_x/5/iaf0" postFractionAlong="0.33691615279170617" synapse="gj1" weight="0.391193307071303"/>
            <electricalConnectionInstanceW id="3" preCell="../Pop_x/0/iaf0" preFractionAlong="0.01282910925261338" postCell="../Pop_x/6/iaf0" postFractionAlong="0.35191368309820115" synapse="gj1" weight="0.229129764480284"/>
            <electricalConnectionInstanceW id="4" preCell="../Pop_x/1/iaf0" preFractionAlong="0.13472760063663358" postCell="../Pop_x/7/iaf0" postFractionAlong="0.19317697004235368" synapse="gj1" weight="0.256362347296543"/>
            <electricalConnectionInstanceW id="5" preCell="../Pop_x/2/iaf0" preFractionAlong="0.08878890486736224" postCell="../Pop_x/0/iaf0" postFractionAlong="0.4332003138771612" synapse="gj1" weight="0.008561214772869"/>
            <electricalConnectionInstanceW id="6" preCell="../Pop_x/2/iaf0" preFractionAlong="0.3348305405234663" postCell="../Pop_x/3/iaf0" postFractionAlong="0.34836702066505143" synapse="gj1" weight="0.639127937228113"/>
            <electricalConnectionInstanceW id="7" preCell="../Pop_x/2/iaf0" preFractionAlong="0.05715921340929664" postCell="../Pop_x/6/iaf0" postFractionAlong="0.5186961247564001" synapse="gj1" weight="0.537536377505688"/>
            <electricalConnectionInstanceW id="8" preCell="../Pop_x/2/iaf0" preFractionAlong="0.5171034866539107" postCell="../Pop_x/7/iaf0" postFractionAlong="0.6296176252275832" synapse="gj1" weight="0.802276645521038"/>
            <electricalConnectionInstanceW id="9" preCell="../Pop_x/3/iaf0" preFractionAlong="0.9804391466902661" postCell="../Pop_x/0/iaf0" postFractionAlong="0.66883435436449" synapse="gj1" weight="0.303805779136783"/>
            <electricalConnectionInstanceW id="10" preCell="../Pop_x/3/iaf0" preFractionAlong="0.3690005483098646" postCell="../Pop_x/2/iaf0" postFractionAlong="0.8934335602088669" synapse="gj1" weight="0.340080850518174"/>
            <electricalConnectionInstanceW id="11" preCell="../Pop_x/3/iaf0" preFractionAlong="0.19709486890681838" postCell="../Pop_x/4/iaf0" postFractionAlong="0.199499344513678" synapse="gj1" weight="0.995265013658"/>
            <electricalConnectionInstanceW id="12" preCell="../Pop_x/3/iaf0" preFractionAlong="0.8090194309909363" postCell="../Pop_x/6/iaf0" postFractionAlong="0.5341834137994497" synapse="gj1" weight="0.786080054207838"/>
            <electricalConnectionInstanceW id="13" preCell="../Pop_x/3/iaf0" preFractionAlong="0.39581331546975873" postCell="../Pop_x/7/iaf0" postFractionAlong="0.22414980709806243" synapse="gj1" weight="0.501257553137533"/>
            <electricalConnectionInstanceW id="14" preCell="../Pop_x/4/iaf0" preFractionAlong="0.12231632092050937" postCell="../Pop_x/0/iaf0" postFractionAlong="0.05243537098650408" synapse="gj1" weight="0.861647072887134"/>
            <electricalConnectionInstanceW id="15" preCell="../Pop_x/4/iaf0" preFractionAlong="0.8204781263847865" postCell="../Pop_x/1/iaf0" postFractionAlong="0.18067605333309233" synapse="gj1" weight="0.97723044310576"/>
            <electricalConnectionInstanceW id="16" preCell="../Pop_x/4/iaf0" preFractionAlong="0.921682844280444" postCell="../Pop_x/2/iaf0" postFractionAlong="0.12232679060259966" synapse="gj1" weight="0.265416067114693"/>
            <electricalConnectionInstanceW id="17" preCell="../Pop_x/4/iaf0" preFractionAlong="0.32469513448083587" postCell="../Pop_x/5/iaf0" postFractionAlong="0.6468358371065772" synapse="gj1" weight="0.265914319759977"/>
            <electricalConnectionInstanceW id="18" preCell="../Pop_x/4/iaf0" preFractionAlong="0.9548546302971884" postCell="../Pop_x/6/iaf0" postFractionAlong="0.18220583441361304" synapse="gj1" weight="0.019912223727405"/>
            <electricalConnectionInstanceW id="19" preCell="../Pop_x/5/iaf0" preFractionAlong="0.8639390172969831" postCell="../Pop_x/1/iaf0" postFractionAlong="0.46340632069197485" synapse="gj1" weight="0.899582526901429"/>
            <electricalConnectionInstanceW id="20" preCell="../Pop_x/5/iaf0" preFractionAlong="0.25336194995859596" postCell="../Pop_x/4/iaf0" postFractionAlong="0.168020375038908" synapse="gj1" weight="0.41605671016593"/>
            <electricalConnectionInstanceW id="21" preCell="../Pop_x/5/iaf0" preFractionAlong="0.9268939013125862" postCell="../Pop_x/6/iaf0" postFractionAlong="0.8396383240376201" synapse="gj1" weight="0.302752804009905"/>
            <electricalConnectionInstanceW id="22" preCell="../Pop_x/6/iaf0" preFractionAlong="0.9408904680768644" postCell="../Pop_x/0/iaf0" postFractionAlong="0.06777491893982879" synapse="gj1" weight="0.939392256680005"/>
            <electricalConnectionInstanceW id="23" preCell="../Pop_x/6/iaf0" preFractionAlong="0.4932188103687801" postCell="../Pop_x/1/iaf0" postFractionAlong="0.1944599146366902" synapse="gj1" weight="0.211630053646445"/>
            <electricalConnectionInstanceW id="24" preCell="../Pop_x/6/iaf0" preFractionAlong="0.5469276311244807" postCell="../Pop_x/2/iaf0" postFractionAlong="0.04184170011186694" synapse="gj1" weight="0.941466772902992"/>
            <electricalConnectionInstanceW id="25" preCell="../Pop_x/6/iaf0" preFractionAlong="0.02596629223721869" postCell="../Pop_x/5/iaf0" postFractionAlong="0.3615328132068878" synapse="gj1" weight="0.152874674393948"/>
            <electricalConnectionInstanceW id="26" preCell="../Pop_x/6/iaf0" preFractionAlong="0.4969333772990141" postCell="../Pop_x/7/iaf0" postFractionAlong="0.042594606330884965" synapse="gj1" weight="0.139222655263883"/>
            <electricalConnectionInstanceW id="27" preCell="../Pop_x/7/iaf0" preFractionAlong="0.21337344788451662" postCell="../Pop_x/2/iaf0" postFractionAlong="0.9366176653447409" synapse="gj1" weight="0.105726946208775"/>
            <electricalConnectionInstanceW id="28" preCell="../Pop_x/7/iaf0" preFractionAlong="0.8513572280315563" postCell="../Pop_x/6/iaf0" postFractionAlong="0.005315297563120658" synapse="gj1" weight="0.788833698585788"/>
        </electricalProjection>
        <electricalProjection id="ElectProj0" presynapticPopulation="IafPop0" postsynapticPopulation="IafPop1">
            <electricalConnection id="0" preCell="0" preFractionAlong="0.03229110016086212" postCell="1" postFractionAlong="0.14640918537283643" synapse="gj1"/>
            <electricalConnection id="1" preCell="0" preFractionAlong="0.9369600355686324" postCell="2" postFractionAlong="0.6613056317319405" synapse="gj1"/>
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        </electricalProjection>
        <continuousProjection id="ProjCC" presynapticPopulation="IafPop0" postsynapticPopulation="IafPop1">
            <continuousConnection id="0" preCell="0" preSegment="0" preFractionAlong="0.5" postCell="0" postSegment="0" postFractionAlong="0.5" preComponent="silent1" postComponent="gs1"/>
        </continuousProjection>
        <continuousProjection id="ProjCCI" presynapticPopulation="Pop_x" postsynapticPopulation="Pop_x">
            <continuousConnectionInstance id="0" preCell="../IafPop0/0/Pop_x" preFractionAlong="0.9250386730013339" postCell="../IafPop1/0/Pop_x" postFractionAlong="0.8902810110177584" preComponent="silent1" postComponent="gs1"/>
        </continuousProjection>
        <continuousProjection id="ProjCCIW" presynapticPopulation="Pop_x" postsynapticPopulation="Pop_x">
            <continuousConnectionInstanceW id="0" preCell="../IafPop0/0/Pop_x" preFractionAlong="0.6039072402510415" postCell="../IafPop1/0/Pop_x" postFractionAlong="0.14402590334225063" preComponent="silent1" postComponent="gs1" weight="5."/>
        </continuousProjection>
        <inputList id="il" population="Pop_x" component="pfs">
            <input id="0" target="../Pop_x/0/iaf0" destination="synapses"/>
            <input id="1" target="../Pop_x/1/iaf0" destination="synapses"/>
            <input id="2" target="../Pop_x/2/iaf0" destination="synapses"/>
            <input id="3" target="../Pop_x/3/iaf0" destination="synapses"/>
            <input id="4" target="../Pop_x/4/iaf0" destination="synapses"/>
            <input id="5" target="../Pop_x/5/iaf0" destination="synapses"/>
            <input id="6" target="../Pop_x/6/iaf0" destination="synapses"/>
            <input id="7" target="../Pop_x/7/iaf0" destination="synapses"/>
        </inputList>
        <inputList id="ilw" population="Pop_x" component="pfs">
            <inputW id="0" target="../Pop_x/0/iaf0" destination="synapses" weight="10."/>
            <inputW id="1" target="../Pop_x/1/iaf0" destination="synapses" weight="10."/>
            <inputW id="2" target="../Pop_x/2/iaf0" destination="synapses" weight="10."/>
            <inputW id="3" target="../Pop_x/3/iaf0" destination="synapses" weight="10."/>
            <inputW id="4" target="../Pop_x/4/iaf0" destination="synapses" weight="10."/>
            <inputW id="5" target="../Pop_x/5/iaf0" destination="synapses" weight="10."/>
            <inputW id="6" target="../Pop_x/6/iaf0" destination="synapses" weight="10."/>
            <inputW id="7" target="../Pop_x/7/iaf0" destination="synapses" weight="10."/>
        </inputList>
    </network>
</neuroml>
